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/batch
! ANSYS input file written by Workbench version 19.2 RELEASE
! File used for geometry attach: C:\Users\chandler\Documents\analise_harmonica_transportador\DISPOSITIVO_files\dp0\SYS\DM\SYS.scdoc
/title,DISPOSITIVO--Modal (A5)
/com,--- Data in consistent MKS units. See Solving Units in the help system for more information.
/units,MKS
/prep7
! Turn off shape checking because checks already performed inside WB mesher.
! See help system for more information.
SHPP,OFF,,NOWARN
etcon,set             ! allow ANSYS to choose best KEYOP's for 180x elements
/com,*********** Nodes for the whole assembly ***********
nblock,3,,20308
(1i9,3e20.9e3)
        1    -2.236419758E-01    -6.762734367E-03    -7.613970916E-02
        2    -2.156299422E-01    -1.251290118E-02    -7.683707289E-02
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-1
/com,*********** Elements for Body 1 "SYS\Viga de Alum_nio" ***********
et,1,187
eblock,19,solid,,5243
(19i9)
        1        1        1        1        0        0        0        0       10        0     3945     7535     7536     7537     7538     9442     9443     9444     9445
     9446     9447
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-1
/com,*********** Elements for Body 2 "Bra_o1\Pe_a de alum_nio" ***********
et,2,187
eblock,19,solid,,1855
(19i9)
        2        2        2        2        0        0        0        0       10        0        1        1        2        3        4      573      574      575      576
      577      578
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-1
/com,*********** Elements for Body 3 "Bra_o1\Cer_mica1" ***********
et,3,187
eblock,19,solid,,22
(19i9)
        3        3        3        3        0        0        0        0       10        0     1856     3446     3452     3451     3447     3470     3461     3460     3498
     3485     3459
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-1
/com,*********** Elements for Body 4 "Bra_o1\Cer_mica2" ***********
et,4,187
eblock,19,solid,,21
(19i9)
        4        4        4        4        0        0        0        0       10        0     1878     3507     3518     3506     3515     3532     3531     3530     3529
     3521     3528
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-1
/com,*********** Elements for Body 5 "Bra_o1\Base de alum_nio" ***********
et,5,187
eblock,19,solid,,108
(19i9)
        5        5        5        5        0        0        0        0       10        0     1899     3570     3571     3572     3573     3619     3620     3621     3622
     3623     3624
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-1
/com,*********** Elements for Body 6 "Bra_o2\Pe_a de alum_nio" ***********
et,6,187
eblock,19,solid,,1787
(19i9)
        6        6        6        6        0        0        0        0       10        0     2007     3818     3819     3820     3821     4377     4378     4379     4380
     4381     4382
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-1
/com,*********** Elements for Body 7 "Bra_o2\Cer_mica1" ***********
et,7,187
eblock,19,solid,,22
(19i9)
        7        7        7        7        0        0        0        0       10        0     3794     7164     7154     7169     7165     7188     7175     7174     7212
     7203     7172
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-1
/com,*********** Elements for Body 8 "Bra_o2\Cer_mica2" ***********
et,8,187
eblock,19,solid,,21
(19i9)
        8        8        8        8        0        0        0        0       10        0     3816     7224     7235     7223     7232     7249     7248     7247     7246
     7238     7245
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-1
/com,*********** Elements for Body 9 "Bra_o2\Base de alum_nio" ***********
et,9,187
eblock,19,solid,,108
(19i9)
        9        9        9        9        0        0        0        0       10        0     3837     7287     7288     7289     7290     7336     7337     7338     7339
     7340     7341
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-1
/com,*********** Send User Defined Coordinate System(s) ***********
csys,0
toffst,273.15,  ! Temperature offset from absolute zero
/com,*********** Set Reference Temperature ***********
tref,22.
/com,*********** Send Materials ***********
Temperature = 'TEMP' ! Temperature
MP,DENS,1,2700,	! kg m^-3
MP,ALPX,1,1.2e-05,	! C^-1
MP,C,1,434,	! J kg^-1 C^-1
MP,KXX,1,60.5,	! W m^-1 C^-1
MP,RSVX,1,1.7e-07,	! kg m^3 A^-2 s^-3
MP,EX,1,70000000000,	! Pa
MP,NUXY,1,0.33,
MP,MURX,1,10000,

Temperature = 'TEMP' ! Temperature
MP,DENS,2,2700,	! kg m^-3
MP,ALPX,2,1.2e-05,	! C^-1
MP,C,2,434,	! J kg^-1 C^-1
MP,KXX,2,60.5,	! W m^-1 C^-1
MP,RSVX,2,1.7e-07,	! kg m^3 A^-2 s^-3
MP,EX,2,70000000000,	! Pa
MP,NUXY,2,0.33,
MP,MURX,2,10000,

Temperature = 'TEMP' ! Temperature
MP,DENS,3,7500,	! kg m^-3
MP,ALPX,3,1.2e-05,	! C^-1
MP,C,3,434,	! J kg^-1 C^-1
MP,KXX,3,60.5,	! W m^-1 C^-1
MP,RSVX,3,1.7e-07,	! kg m^3 A^-2 s^-3
MP,EX,3,81301000000,	! Pa
MP,EY,3,81301000000,	! Pa
MP,EZ,3,64516000000,	! Pa
MP,PRXY,3,0.3293,
MP,PRYZ,3,0.4317,
MP,PRXZ,3,0.4317,
MP,GXY,3,15291000000,	! Pa
MP,GYZ,3,12821000000,	! Pa
MP,GXZ,3,12821000000,	! Pa
MP,MURX,3,10000,

Temperature = 'TEMP' ! Temperature
MP,DENS,4,7500,	! kg m^-3
MP,ALPX,4,1.2e-05,	! C^-1
MP,C,4,434,	! J kg^-1 C^-1
MP,KXX,4,60.5,	! W m^-1 C^-1
MP,RSVX,4,1.7e-07,	! kg m^3 A^-2 s^-3
MP,EX,4,81301000000,	! Pa
MP,EY,4,81301000000,	! Pa
MP,EZ,4,64516000000,	! Pa
MP,PRXY,4,0.3293,
MP,PRYZ,4,0.4317,
MP,PRXZ,4,0.4317,
MP,GXY,4,15291000000,	! Pa
MP,GYZ,4,12821000000,	! Pa
MP,GXZ,4,12821000000,	! Pa
MP,MURX,4,10000,

Temperature = 'TEMP' ! Temperature
MP,DENS,5,2700,	! kg m^-3
MP,ALPX,5,1.2e-05,	! C^-1
MP,C,5,434,	! J kg^-1 C^-1
MP,KXX,5,60.5,	! W m^-1 C^-1
MP,RSVX,5,1.7e-07,	! kg m^3 A^-2 s^-3
MP,EX,5,70000000000,	! Pa
MP,NUXY,5,0.33,
MP,MURX,5,10000,

Temperature = 'TEMP' ! Temperature
MP,DENS,6,2700,	! kg m^-3
MP,ALPX,6,1.2e-05,	! C^-1
MP,C,6,434,	! J kg^-1 C^-1
MP,KXX,6,60.5,	! W m^-1 C^-1
MP,RSVX,6,1.7e-07,	! kg m^3 A^-2 s^-3
MP,EX,6,70000000000,	! Pa
MP,NUXY,6,0.33,
MP,MURX,6,10000,

Temperature = 'TEMP' ! Temperature
MP,DENS,7,7500,	! kg m^-3
MP,ALPX,7,1.2e-05,	! C^-1
MP,C,7,434,	! J kg^-1 C^-1
MP,KXX,7,60.5,	! W m^-1 C^-1
MP,RSVX,7,1.7e-07,	! kg m^3 A^-2 s^-3
MP,EX,7,81301000000,	! Pa
MP,EY,7,81301000000,	! Pa
MP,EZ,7,64516000000,	! Pa
MP,PRXY,7,0.3293,
MP,PRYZ,7,0.4317,
MP,PRXZ,7,0.4317,
MP,GXY,7,15291000000,	! Pa
MP,GYZ,7,12821000000,	! Pa
MP,GXZ,7,12821000000,	! Pa
MP,MURX,7,10000,

Temperature = 'TEMP' ! Temperature
MP,DENS,8,7500,	! kg m^-3
MP,ALPX,8,1.2e-05,	! C^-1
MP,C,8,434,	! J kg^-1 C^-1
MP,KXX,8,60.5,	! W m^-1 C^-1
MP,RSVX,8,1.7e-07,	! kg m^3 A^-2 s^-3
MP,EX,8,81301000000,	! Pa
MP,EY,8,81301000000,	! Pa
MP,EZ,8,64516000000,	! Pa
MP,PRXY,8,0.3293,
MP,PRYZ,8,0.4317,
MP,PRXZ,8,0.4317,
MP,GXY,8,15291000000,	! Pa
MP,GYZ,8,12821000000,	! Pa
MP,GXZ,8,12821000000,	! Pa
MP,MURX,8,10000,

Temperature = 'TEMP' ! Temperature
MP,DENS,9,2700,	! kg m^-3
MP,ALPX,9,1.2e-05,	! C^-1
MP,C,9,434,	! J kg^-1 C^-1
MP,KXX,9,60.5,	! W m^-1 C^-1
MP,RSVX,9,1.7e-07,	! kg m^3 A^-2 s^-3
MP,EX,9,70000000000,	! Pa
MP,NUXY,9,0.33,
MP,MURX,9,10000,

!************************* Model Summary ********************
!SYS\Viga de Alum_nio,	Aluminio,	matid,	1
!Bra_o1\Pe_a de alum_nio,	Aluminio,	matid,	2
!Bra_o1\Cer_mica1,	Piezo,	matid,	3
!Bra_o1\Cer_mica2,	Piezo,	matid,	4
!Bra_o1\Base de alum_nio,	Aluminio,	matid,	5
!Bra_o2\Pe_a de alum_nio,	Aluminio,	matid,	6
!Bra_o2\Cer_mica1,	Piezo,	matid,	7
!Bra_o2\Cer_mica2,	Piezo,	matid,	8
!Bra_o2\Base de alum_nio,	Aluminio,	matid,	9
!************************* End Model Summary ********************
/com,*********** Create Contact "Contact Region" ***********
*set,tid,11
*set,cid,10
r,tid
r,cid
et,tid,170
et,cid,174
eblock,10,,,7
(15i9)
     9188       11       11       11        0      450      419      418      418     2898     3145      418     2675
     9189       11       11       11        0      420      450      421      421     2627     2620      421     2626
     9190       11       11       11        0      450      423      422      422     2606     2605      422     2607
     9191       11       11       11        0      422      421      450      450     2622     2620      450     2607
     9192       11       11       11        0      450      418      417      417     2675     2610      417     2624
     9193       11       11       11        0      419      450      420      420     2898     2627      420     2703
     9194       11       11       11        0      450      417      423      423     2624     2625      423     2606
-1
eblock,10,,,7
(15i9)
     9195       10       10       10        0      450      419      418      418     2898     3145      418     2675
     9196       10       10       10        0      420      450      421      421     2627     2620      421     2626
     9197       10       10       10        0      450      423      422      422     2606     2605      422     2607
     9198       10       10       10        0      422      421      450      450     2622     2620      450     2607
     9199       10       10       10        0      450      418      417      417     2675     2610      417     2624
     9200       10       10       10        0      419      450      420      420     2898     2627      420     2703
     9201       10       10       10        0      450      417      423      423     2624     2625      423     2606
-1
eblock,10,,,7
(15i9)
     9202       10       11       10        0     3449     3448     3452     3452     3463     3473     3452     3492
     9203       10       11       10        0     3452     3445     3444     3444     3481     3502     3444     3467
     9204       10       11       10        0     3446     3452     3447     3447     3470     3485     3447     3498
     9205       10       11       10        0     3444     3450     3452     3452     3495     3489     3452     3467
     9206       10       11       10        0     3452     3446     3445     3445     3470     3503     3445     3481
     9207       10       11       10        0     3447     3452     3448     3448     3485     3473     3448     3475
     9208       10       11       10        0     3450     3449     3452     3452     3478     3492     3452     3489
-1
eblock,10,,,7
(15i9)
     9209       11       10       11        0     3449     3448     3452     3452     3463     3473     3452     3492
     9210       11       10       11        0     3452     3445     3444     3444     3481     3502     3444     3467
     9211       11       10       11        0     3446     3452     3447     3447     3470     3485     3447     3498
     9212       11       10       11        0     3444     3450     3452     3452     3495     3489     3452     3467
     9213       11       10       11        0     3452     3446     3445     3445     3470     3503     3445     3481
     9214       11       10       11        0     3447     3452     3448     3448     3485     3473     3448     3475
     9215       11       10       11        0     3450     3449     3452     3452     3478     3492     3452     3489
-1
keyo,cid,8,2               ! auto create asymmetric contact (from Program Controlled setting)
keyo,cid,10,0              ! adjust contact stiffness each NR iteration (from Program Controlled setting)
keyo,cid,12,5              ! bonded always
keyo,cid,18,1              ! small sliding turned on by application
keyo,cid,2,0               ! augmented Lagrange (from Program Controlled setting)
keyo,cid,4,0               ! on Gauss point (from Program Controlled setting)
keyo,cid,9,1               ! ignore initial gaps/penetration
keyo,cid,7,0               ! No Prediction
rmod,tid,3,10.      ! FKN
rmod,tid,5,0.       ! ICONT
rmod,tid,6,0.       ! PINB
rmod,tid,10,0.      ! CNOF
rmod,tid,12,0.      ! FKT
rmod,tid,36,505     ! WB DSID
rmod,cid,3,10.      ! FKN
rmod,cid,5,0.       ! ICONT
rmod,cid,6,0.       ! PINB
rmod,cid,10,0.      ! CNOF
rmod,cid,12,0.      ! FKT
rmod,cid,36,505     ! WB DSID
/com,*********** Create Contact "Contact Region 2" ***********
*set,tid,13
*set,cid,12
r,tid
r,cid
et,tid,170
et,cid,174
eblock,10,,,21
(15i9)
     9216       13       13       13        0      401      500      497      497     2895     3103      497     2818
     9217       13       13       13        0      393      400      478      478     2954     2928      478     2272
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-1
eblock,10,,,21
(15i9)
     9237       12       12       12        0      401      500      497      497     2895     3103      497     2818
     9238       12       12       12        0      393      400      478      478     2954     2928      478     2272
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-1
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eblock,10,,,85
(15i9)
     9343       13       12       13        0     9337     9340     9339     9339    17809    17811     9339    17808
     9344       13       12       13        0     9340     9345     9339     9339    17880    17877     9339    17811
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-1
keyo,cid,8,2               ! auto create asymmetric contact (from Program Controlled setting)
keyo,cid,10,0              ! adjust contact stiffness each NR iteration (from Program Controlled setting)
keyo,cid,12,5              ! bonded always
keyo,cid,18,1              ! small sliding turned on by application
keyo,cid,2,0               ! augmented Lagrange (from Program Controlled setting)
keyo,cid,4,0               ! on Gauss point (from Program Controlled setting)
keyo,cid,9,1               ! ignore initial gaps/penetration
keyo,cid,7,0               ! No Prediction
rmod,tid,3,10.      ! FKN
rmod,tid,5,0.       ! ICONT
rmod,tid,6,0.       ! PINB
rmod,tid,10,0.      ! CNOF
rmod,tid,12,0.      ! FKT
rmod,tid,36,508     ! WB DSID
rmod,cid,3,10.      ! FKN
rmod,cid,5,0.       ! ICONT
rmod,cid,6,0.       ! PINB
rmod,cid,10,0.      ! CNOF
rmod,cid,12,0.      ! FKT
rmod,cid,36,508     ! WB DSID
/com,*********** Create Contact "Contact Region 3" ***********
*set,tid,15
*set,cid,14
r,tid
r,cid
et,tid,170
et,cid,174
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eblock,10,,,7
(15i9)
     9449       15       14       15        0     3514     3519     3515     3515     3537     3535     3515     3538
     9450       15       14       15        0     3519     3516     3515     3515     3560     3534     3515     3535
     9451       15       14       15        0     3513     3519     3514     3514     3539     3537     3514     3562
     9452       15       14       15        0     3519     3511     3517     3517     3547     3553     3517     3554
     9453       15       14       15        0     3519     3512     3511     3511     3552     3568     3511     3547
     9454       15       14       15        0     3516     3519     3517     3517     3560     3554     3517     3546
     9455       15       14       15        0     3519     3513     3512     3512     3539     3569     3512     3552
-1
keyo,cid,8,2               ! auto create asymmetric contact (from Program Controlled setting)
keyo,cid,10,0              ! adjust contact stiffness each NR iteration (from Program Controlled setting)
keyo,cid,12,5              ! bonded always
keyo,cid,18,1              ! small sliding turned on by application
keyo,cid,2,0               ! augmented Lagrange (from Program Controlled setting)
keyo,cid,4,0               ! on Gauss point (from Program Controlled setting)
keyo,cid,9,1               ! ignore initial gaps/penetration
keyo,cid,7,0               ! No Prediction
rmod,tid,3,10.      ! FKN
rmod,tid,5,0.       ! ICONT
rmod,tid,6,0.       ! PINB
rmod,tid,10,0.      ! CNOF
rmod,tid,12,0.      ! FKT
rmod,tid,36,511     ! WB DSID
rmod,cid,3,10.      ! FKN
rmod,cid,5,0.       ! ICONT
rmod,cid,6,0.       ! PINB
rmod,cid,10,0.      ! CNOF
rmod,cid,12,0.      ! FKT
rmod,cid,36,511     ! WB DSID
/com,*********** Create Contact "Contact Region 4" ***********
*set,tid,17
*set,cid,16
r,tid
r,cid
et,tid,170
et,cid,174
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eblock,10,,,7
(15i9)
     9477       17       16       17        0     3617     3611     3618     3618     3804     3793     3618     3795
     9478       17       16       17        0     3611     3614     3613     3613     3812     3811     3613     3805
     9479       17       16       17        0     3614     3611     3615     3615     3812     3798     3615     3817
     9480       17       16       17        0     3618     3611     3612     3612     3793     3802     3612     3803
     9481       17       16       17        0     3615     3611     3616     3616     3798     3796     3616     3801
     9482       17       16       17        0     3613     3612     3611     3611     3806     3802     3611     3805
     9483       17       16       17        0     3611     3617     3616     3616     3804     3792     3616     3796
-1
keyo,cid,8,2               ! auto create asymmetric contact (from Program Controlled setting)
keyo,cid,10,0              ! adjust contact stiffness each NR iteration (from Program Controlled setting)
keyo,cid,12,5              ! bonded always
keyo,cid,18,1              ! small sliding turned on by application
keyo,cid,2,0               ! augmented Lagrange (from Program Controlled setting)
keyo,cid,4,0               ! on Gauss point (from Program Controlled setting)
keyo,cid,9,1               ! ignore initial gaps/penetration
keyo,cid,7,0               ! No Prediction
rmod,tid,3,10.      ! FKN
rmod,tid,5,0.       ! ICONT
rmod,tid,6,0.       ! PINB
rmod,tid,10,0.      ! CNOF
rmod,tid,12,0.      ! FKT
rmod,tid,36,514     ! WB DSID
rmod,cid,3,10.      ! FKN
rmod,cid,5,0.       ! ICONT
rmod,cid,6,0.       ! PINB
rmod,cid,10,0.      ! CNOF
rmod,cid,12,0.      ! FKT
rmod,cid,36,514     ! WB DSID
/com,*********** Create Contact "Contact Region 5" ***********
*set,tid,19
*set,cid,18
r,tid
r,cid
et,tid,170
et,cid,174
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eblock,10,,,7
(15i9)
     9505       19       18       19        0     7167     7166     7154     7154     7185     7190     7154     7210
     9506       19       18       19        0     7154     7163     7162     7162     7198     7220     7162     7186
     9507       19       18       19        0     7164     7154     7165     7165     7188     7203     7165     7212
     9508       19       18       19        0     7162     7168     7154     7154     7215     7204     7154     7186
     9509       19       18       19        0     7154     7164     7163     7163     7188     7219     7163     7198
     9510       19       18       19        0     7168     7167     7154     7154     7197     7210     7154     7204
     9511       19       18       19        0     7165     7154     7166     7166     7203     7190     7166     7189
-1
keyo,cid,8,2               ! auto create asymmetric contact (from Program Controlled setting)
keyo,cid,10,0              ! adjust contact stiffness each NR iteration (from Program Controlled setting)
keyo,cid,12,5              ! bonded always
keyo,cid,18,1              ! small sliding turned on by application
keyo,cid,2,0               ! augmented Lagrange (from Program Controlled setting)
keyo,cid,4,0               ! on Gauss point (from Program Controlled setting)
keyo,cid,9,1               ! ignore initial gaps/penetration
keyo,cid,7,0               ! No Prediction
rmod,tid,3,10.      ! FKN
rmod,tid,5,0.       ! ICONT
rmod,tid,6,0.       ! PINB
rmod,tid,10,0.      ! CNOF
rmod,tid,12,0.      ! FKT
rmod,tid,36,517     ! WB DSID
rmod,cid,3,10.      ! FKN
rmod,cid,5,0.       ! ICONT
rmod,cid,6,0.       ! PINB
rmod,cid,10,0.      ! CNOF
rmod,cid,12,0.      ! FKT
rmod,cid,36,517     ! WB DSID
/com,*********** Create Contact "Contact Region 6" ***********
*set,tid,21
*set,cid,20
r,tid
r,cid
et,tid,170
et,cid,174
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eblock,10,,,71
(15i9)
     9619       21       20       21        0     8471     8523     8521     8521    13964    14039     8521    13955
     9620       21       20       21        0     8703     8731     8705     8705    14803    14805     8705    14700
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-1
keyo,cid,8,2               ! auto create asymmetric contact (from Program Controlled setting)
keyo,cid,10,0              ! adjust contact stiffness each NR iteration (from Program Controlled setting)
keyo,cid,12,5              ! bonded always
keyo,cid,18,1              ! small sliding turned on by application
keyo,cid,2,0               ! augmented Lagrange (from Program Controlled setting)
keyo,cid,4,0               ! on Gauss point (from Program Controlled setting)
keyo,cid,9,1               ! ignore initial gaps/penetration
keyo,cid,7,0               ! No Prediction
rmod,tid,3,10.      ! FKN
rmod,tid,5,0.       ! ICONT
rmod,tid,6,0.       ! PINB
rmod,tid,10,0.      ! CNOF
rmod,tid,12,0.      ! FKT
rmod,tid,36,520     ! WB DSID
rmod,cid,3,10.      ! FKN
rmod,cid,5,0.       ! ICONT
rmod,cid,6,0.       ! PINB
rmod,cid,10,0.      ! CNOF
rmod,cid,12,0.      ! FKT
rmod,cid,36,520     ! WB DSID
/com,*********** Create Contact "Contact Region 7" ***********
*set,tid,23
*set,cid,22
r,tid
r,cid
et,tid,170
et,cid,174
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eblock,10,,,7
(15i9)
     9711       23       22       23        0     7231     7236     7232     7232     7254     7252     7232     7255
     9712       23       22       23        0     7236     7233     7232     7232     7271     7251     7232     7252
     9713       23       22       23        0     7230     7236     7231     7231     7256     7254     7231     7279
     9714       23       22       23        0     7236     7228     7234     7234     7264     7270     7234     7277
     9715       23       22       23        0     7236     7229     7228     7228     7269     7285     7228     7264
     9716       23       22       23        0     7233     7236     7234     7234     7271     7277     7234     7263
     9717       23       22       23        0     7236     7230     7229     7229     7256     7286     7229     7269
-1
keyo,cid,8,2               ! auto create asymmetric contact (from Program Controlled setting)
keyo,cid,10,0              ! adjust contact stiffness each NR iteration (from Program Controlled setting)
keyo,cid,12,5              ! bonded always
keyo,cid,18,1              ! small sliding turned on by application
keyo,cid,2,0               ! augmented Lagrange (from Program Controlled setting)
keyo,cid,4,0               ! on Gauss point (from Program Controlled setting)
keyo,cid,9,1               ! ignore initial gaps/penetration
keyo,cid,7,0               ! No Prediction
rmod,tid,3,10.      ! FKN
rmod,tid,5,0.       ! ICONT
rmod,tid,6,0.       ! PINB
rmod,tid,10,0.      ! CNOF
rmod,tid,12,0.      ! FKT
rmod,tid,36,523     ! WB DSID
rmod,cid,3,10.      ! FKN
rmod,cid,5,0.       ! ICONT
rmod,cid,6,0.       ! PINB
rmod,cid,10,0.      ! CNOF
rmod,cid,12,0.      ! FKT
rmod,cid,36,523     ! WB DSID
/com,*********** Create Contact "Contact Region 8" ***********
*set,tid,25
*set,cid,24
r,tid
r,cid
et,tid,170
et,cid,174
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eblock,10,,,7
(15i9)
     9739       25       24       25        0     7334     7328     7335     7335     7521     7510     7335     7512
     9740       25       24       25        0     7328     7331     7330     7330     7529     7528     7330     7522
     9741       25       24       25        0     7331     7328     7332     7332     7529     7515     7332     7534
     9742       25       24       25        0     7335     7328     7329     7329     7510     7519     7329     7520
     9743       25       24       25        0     7332     7328     7333     7333     7515     7513     7333     7518
     9744       25       24       25        0     7330     7329     7328     7328     7523     7519     7328     7522
     9745       25       24       25        0     7328     7334     7333     7333     7521     7509     7333     7513
-1
keyo,cid,8,2               ! auto create asymmetric contact (from Program Controlled setting)
keyo,cid,10,0              ! adjust contact stiffness each NR iteration (from Program Controlled setting)
keyo,cid,12,5              ! bonded always
keyo,cid,18,1              ! small sliding turned on by application
keyo,cid,2,0               ! augmented Lagrange (from Program Controlled setting)
keyo,cid,4,0               ! on Gauss point (from Program Controlled setting)
keyo,cid,9,1               ! ignore initial gaps/penetration
keyo,cid,7,0               ! No Prediction
rmod,tid,3,10.      ! FKN
rmod,tid,5,0.       ! ICONT
rmod,tid,6,0.       ! PINB
rmod,tid,10,0.      ! CNOF
rmod,tid,12,0.      ! FKT
rmod,tid,36,526     ! WB DSID
rmod,cid,3,10.      ! FKN
rmod,cid,5,0.       ! ICONT
rmod,cid,6,0.       ! PINB
rmod,cid,10,0.      ! CNOF
rmod,cid,12,0.      ! FKT
rmod,cid,36,526     ! WB DSID
nsel,all
esel,all
CMBLOCK,SELECTION,ELEM,        1
(8i10)
        30
CMBLOCK,SELECTION_2,ELEM,        2
(8i10)
        30        31
/com,*********** Fixed Supports ***********
CMBLOCK,_FIXEDSU,NODE,      144
(8i10)
       227       228       235       261       263       264       306       320
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
cmsel,s,_FIXEDSU
d,all,all
nsel,all
fini
/solu
antype,2                   ! modal analysis
modopt,lanb,14,20000.,22000.
outres,erase
outres,all,none
outres,nsol,all
mxpand                    ! default expand in case of complex solution
dmpopt,esav,no
dmpopt,emat,no
dmpopt,full,no
! ****** Begin Command Snippet ******
d, POS, VOLT, 700
d, NEG, VOLT, 0
! ****** End   Command Snippet ******
! *********** WB SOLVE COMMAND ***********
! check interactive state
*get,ANSINTER_,active,,int
*if,ANSINTER_,ne,0,then
/eof
*endif
solve
/com *************** Write FE CONNECTORS *********
CEWRITE,file,ce,,INTE
*get,_nmodalsolproc,active,0,numcpu
fini
/post1
*dim,_direction,CHAR,6,1
_direction(1) = 'X'
_direction(2) = 'Y'
_direction(3) = 'Z'
_direction(4) = 'ROTX'
_direction(5) = 'ROTY'
_direction(6) = 'ROTZ'
*get,_lastLS,active,0,set,LSTP
*get,_beginset,active,0,set,nset,first,_lastLS
*get,_endset,active,0,set,nset,last,_lastLS
_nummodes = _endset - _beginset + 1
*do,i_mode,1,_nummodes
   *do,j_component,1,6
			*get,PFACT_%i_mode%_%j_component%,MODE,%i_mode%,PFACT,,DIREC,_direction(%j_component%)
   *enddo
*enddo
*dim,_tmdirection,CHAR,6,1
_tmdirection(1) = 'X'
_tmdirection(2) = 'Y'
_tmdirection(3) = 'Z'
_tmdirection(4) = 'X'
_tmdirection(5) = 'Y'
_tmdirection(6) = 'Z'
*do,j_component,1,6
    *if,j_component,gt,3,then
        *get,TOTALMASS_%j_component%,ELEM,0,IOR,_tmdirection(%j_component%)
    *else
        *get,TOTALMASS_%j_component%,ELEM,0,MTOT,_tmdirection(%j_component%)
    *endif
*enddo
fini
