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/batch
! ANSYS input file written by Workbench version 19.2 RELEASE
! File used for geometry attach: C:\Users\chandler\Documents\analise_harmonica_transportador\placa retangular_files\dp0\SYS\DM\SYS.scdoc
/title,placa retangular--Static Structural (B5)
/com,--- Data in consistent MKS units. See Solving Units in the help system for more information.
/units,MKS
/prep7
! Turn off shape checking because checks already performed inside WB mesher.
! See help system for more information.
SHPP,OFF,,NOWARN
etcon,set             ! allow ANSYS to choose best KEYOP's for 180x elements
/com,*********** Nodes for the whole assembly ***********
nblock,3,,2692
(1i9,3e20.9e3)
        1    -1.875000000E-02     1.175000000E-02    -1.333333333E-03
        2    -1.875000000E-02     1.175000000E-02    -6.666666667E-04
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-1
/com,*********** Elements for Body 1 "SYS\Solid" ***********
et,1,186
keyo,1,2,1          ! set full integration on SOLID186
eblock,19,solid,,192
(19i9)
        1        1        1        1        0        0        0        0       20        0        1        1      280      302      316      147      294      303      318
      329     1075     1110      330      806     1101     1111      807      328     1074     1109     1137
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-1
/com,*********** Elements for Body 2 "SYS\Solid1" ***********
et,2,186
keyo,2,2,1          ! set full integration on SOLID186
eblock,19,solid,,200
(19i9)
        2        2        2        2        0        0        0        0       20        0      193     1144     1464     1503     1514     1295     1483     1502     1521
     1526     2366     2425     1527     2022     2404     2424     2023     1524     2365     2423     2440
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-1
/com,*********** Send User Defined Coordinate System(s) ***********
csys,0
toffst,273.15,  ! Temperature offset from absolute zero
/com,*********** Set Reference Temperature ***********
tref,22.
/com,*********** Send Materials ***********
Temperature = 'TEMP' ! Temperature
MP,DENS,1,7850,	! kg m^-3
MP,ALPX,1,1.2e-05,	! C^-1
MP,C,1,434,	! J kg^-1 C^-1
MP,KXX,1,60.5,	! W m^-1 C^-1
MP,RSVX,1,1.7e-07,	! kg m^3 A^-2 s^-3
MP,EX,1,200000000000,	! Pa
MP,NUXY,1,0.3,
MP,MURX,1,10000,

Temperature = 'TEMP' ! Temperature
MP,DENS,2,7850,	! kg m^-3
MP,ALPX,2,1.2e-05,	! C^-1
MP,C,2,434,	! J kg^-1 C^-1
MP,KXX,2,60.5,	! W m^-1 C^-1
MP,RSVX,2,1.7e-07,	! kg m^3 A^-2 s^-3
MP,EX,2,200000000000,	! Pa
MP,NUXY,2,0.3,
MP,MURX,2,10000,

! ****** Begin Command Snippet ******
*dim,matids,,1
*set,matids(1),1
*set,matid,1
*dim,typeids,,1
*set,typeids(1),1
ET,MATID,226,1001
MP,PERX,MATID,804.6 d
MP,PERY,MATID,804.6
MP,PERZ,MATID,659.7
TB,PIEZ,MATID
TBDATA,3,-4.1
TBDATA,6,-4.1
TBDATA,9,14.1
TBDATA,14,10.5
TBDATA,16,10.5
*set, matids, ,
*set, typeids, ,
! ****** End   Command Snippet ******
!************************* Model Summary ********************
!SYS\Solid,	Structural Steel,	matid,	1
!SYS\Solid1,	Structural Steel,	matid,	2
!************************* End Model Summary ********************
/com,*********** Create Contact "Frictionless - SYS\Solid To SYS\Solid1" ***********
*set,tid,4
*set,cid,3
r,tid
r,cid
et,tid,170
et,cid,174
eblock,10,,,64
(15i9)
      393        4        4        4        0      210      148      203      211      811      810      933      948
      394        4        4        4        0      209      155      148      210      832      809      811      946
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-1
eblock,10,,,64
(15i9)
      457        3        3        3        0      210      148      203      211      811      810      933      948
      458        3        3        3        0      209      155      148      210      832      809      811      946
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-1
eblock,10,,,30
(15i9)
      521        3        4        3        0     1392     1324     1320     1393     2093     2083     2084     2241
      522        3        4        3        0     1391     1328     1324     1392     2102     2092     2093     2239
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-1
eblock,10,,,30
(15i9)
      551        4        3        4        0     1392     1324     1320     1393     2093     2083     2084     2241
      552        4        3        4        0     1391     1328     1324     1392     2102     2092     2093     2239
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-1
keyo,cid,8,2               ! auto create asymmetric contact (from Program Controlled setting)
keyo,cid,10,0              ! adjust contact stiffness each NR iteration (from Program Controlled setting)
keyo,cid,12,0              ! standard contact
keyo,cid,18,1              ! small sliding turned on by application
keyo,cid,2,0               ! augmented Lagrange (from Program Controlled setting)
keyo,cid,4,0               ! on Gauss point (from Program Controlled setting)
keyo,cid,9,0               ! use real geometry with stepped effects
keyo,cid,7,0               ! No Prediction
rmod,tid,3,1.       ! FKN
rmod,tid,5,0.       ! ICONT
rmod,tid,6,0.       ! PINB
rmod,tid,10,0.      ! CNOF
rmod,tid,12,0.      ! FKT
rmod,tid,36,28      ! WB DSID
rmod,cid,3,1.       ! FKN
rmod,cid,5,0.       ! ICONT
rmod,cid,6,0.       ! PINB
rmod,cid,10,0.      ! CNOF
rmod,cid,12,0.      ! FKT
rmod,cid,36,28      ! WB DSID
nsel,all
esel,all
/com,*********** Send Named Selection as Node Component ***********
CMBLOCK,POS     ,NODE,      225
(8i10)
        99       100       101       102       103       104       105       106
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/com,*********** Send Named Selection as Node Component ***********
CMBLOCK,NEG     ,NODE,      225
(8i10)
       148       149       150       151       152       153       154       155
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/com,*********** Fixed Supports ***********
CMBLOCK,_FIXEDSU,NODE,      270
(8i10)
        99       100       101       102       103       104       105       106
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cmsel,s,_FIXEDSU
d,all,all
nsel,all
fini
/com,****************************************************************************
/com,*************************    SOLUTION       ********************************
/com,****************************************************************************
/solu
antype,0                   ! static analysis
eqsl,sparse,,,,,1
cntr,print,1               ! print out contact info and also make no initial contact an error
dmpoption,emat,no             ! Don't combine emat file for DANSYS
dmpoption,esav,no             ! Don't combine esav file for DANSYS
nldiag,cont,iter           ! print out contact info each equilibrium iteration
rescontrol,define,last,last,,dele	   ! Program Controlled
/com,****************************************************
/com,******************* SOLVE FOR LS 1 OF 1 ****************
autots,on                  ! Workbench Program Controlled automatic time stepping
nsub,1,10,1                ! due to presence of general nonlinear
time,1.
outres,erase
outres,all,none
outres,nsol,all,
outres,rsol,all
outres,strs,all,
outres,epel,all,
outres,eppl,all,
stabilize,off                   ! Stabilization turned OFF by user
! ****** Begin Command Snippet ******
d, POS, VOLT, 700
d, NEG, VOLT, 0
! ****** End   Command Snippet ******
! *********** WB SOLVE COMMAND ***********
! check interactive state
*get,ANSINTER_,active,,int
*if,ANSINTER_,ne,0,then
/eof
*endif
solve
/com *************** Write FE CONNECTORS *********
CEWRITE,file,ce,,INTE
/com,****************************************************
/com,*************** FINISHED SOLVE FOR LS 1 *************
save,file,db
/post1
fini
