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======================= COMANDOS PARA ANÁLISE HARMÔNICA ====================================

/INPUT,'DISPOSITIVO VERSAO APDL','anf','Documents/analise_harmonica_transportador'
/LIG,   1,0, 0.300
/LIG,   1,1, 1.000,   0.00000000000    ,   0.00000000000    ,   0.00000000000    ,   0.00000000000
VPLOT
FINISH
/PREP7
!*** piezo constants
*SET,e31,-5.2
*SET,e33,15.1
*SET,e15,12.7
TB,PIEZ,2, , ,0   !trabalhando com [e] Ã© o default
TBDATA,1,0,e31,0
TBDATA,4,0,e33,0
TBDATA,7,0,e31,0
TBDATA,10,e15,0,0
TBDATA,13,0,0,e15
!*** Elastic constants at E cst
*SET,c11,13.9E10
*SET,c12,7.78E10
*SET,c13,7.43E10
*SET,c33,11.5E10
*SET,c44,2.56E10
*SET,c66,.5*(c11-c12)
TB,ANEL,2
TBDATA,1,c11,c13,c12,0,0,0
TBDATA,7,c33,c13,0,0,0
TBDATA,12,c11,0,0,0
TBDATA,16,c44,0,0
TBDATA,19,c44,0
TBDATA,21,c66
!*** Constantes dieletricas a strain (S) constante.
!e00=8.85E-12
*SET,eps1,730*8.85E-12
*SET,eps3,635*8.85E-12
MP,PERX,2,eps1
MP,PERY,2,eps3
MP,PERZ,2,eps1
!***  Densidade e amortecimento
MP,DENS,2,7500
MP,DAMP,2,3.3863E-012  ! valor chutado

!********* definição dos tipos de elementos

!* CERÂMICA

ET,1,solid98
KEYOPT,1,1,3
KEYOPT,1,3,0
KEYOPT,1,5,0

!* ALUMINIO

MPTEMP,,,,,,,,
MPTEMP,1,0
MPDATA,EX,1,,70E9
MPDATA,PRXY,1,,0.33
MPTEMP,,,,,,,,
MPTEMP,1,0
MPDATA,DENS,1,,2700

!* Malhagem

TYPE,   1
MAT,       2
REAL,
ESYS,       0
SECNUM,
ESIZE,0.075,0,
ESIZE,0.0075,0,
MSHAPE,1,3D
MSHKEY,0
FLST,5,4,6,ORDE,4
FITEM,5,2
FITEM,5,-3
FITEM,5,6
FITEM,5,-7
CM,_Y,VOLU
VSEL, , , ,P51X
CM,_Y1,VOLU
CHKMSH,'VOLU'
CMSEL,S,_Y
VMESH,_Y1
CMDELE,_Y
CMDELE,_Y1
CMDELE,_Y2
VPLOT
TYPE,   1
MAT,       1
REAL,
ESYS,       0
SECNUM,
FLST,5,5,6,ORDE,5
FITEM,5,1
FITEM,5,4
FITEM,5,-5
FITEM,5,8
FITEM,5,-9
CM,_Y,VOLU
VSEL, , , ,P51X
CM,_Y1,VOLU
CHKMSH,'VOLU'
CMSEL,S,_Y
VMESH,_Y1
CMDELE,_Y
CMDELE,_Y1
CMDELE,_Y2

!* aplicação das tensões

FLST,2,78,1,ORDE,4
FITEM,2,394
FITEM,2,-432
FITEM,2,10873
FITEM,2,-10911
/GO
D,P51X,VOLT,120
FLST,2,78,1,ORDE,4
FITEM,2,355
FITEM,2,-393
FITEM,2,571
FITEM,2,-609
/GO
D,P51X,VOLT,0
FLST,2,78,1,ORDE,4
FITEM,2,532
FITEM,2,-570
FITEM,2,15978
FITEM,2,-16016
/GO
D,P51X,VOLT,-120
FLST,2,78,1,ORDE,4
FITEM,2,40
FITEM,2,-78
FITEM,2,2926
FITEM,2,-2964
/GO
D,P51X,VOLT,120
FLST,2,78,1,ORDE,4
FITEM,2,1
FITEM,2,-39
FITEM,2,217
FITEM,2,-255
/GO
D,P51X,VOLT,0
FLST,2,78,1,ORDE,4
FITEM,2,178
FITEM,2,-216
FITEM,2,8088
FITEM,2,-8126
/GO
D,P51X,VOLT,-120

!* ACOPLAMENTO --- COMENTÁRIOS

!* ACOPLAMENTO DE CIMA -- NÓ 2927

!* DO MEIO -- NÓ 218
