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/batch
! ANSYS input file written by Workbench version 19.2 RELEASE
! File used for geometry attach: C:\Users\chandler\AppData\Local\Temp\WB_CHANDLER-PC_chandler_2864_2\unsaved_project_files\dp0\SYS\DM\SYS.scdoc
/title,unsaved_project--Harmonic Response (A5)
/com,--- Data in consistent MKS units. See Solving Units in the help system for more information.
/units,MKS
/prep7
! Turn off shape checking because checks already performed inside WB mesher.
! See help system for more information.
SHPP,OFF,,NOWARN
etcon,set             ! allow ANSYS to choose best KEYOP's for 180x elements
/com,*********** Nodes for the whole assembly ***********
nblock,3,,990
(1i9,3e20.9e3)
        1     9.271428571E-04     3.166666667E-03     5.000000000E-04
        2     9.271428571E-04     2.333333333E-03     5.000000000E-04
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-1
/com,*********** Elements for Body 1 "SYS\viga" ***********
et,1,186
keyo,1,2,1          ! set full integration on SOLID186
eblock,19,solid,,60
(19i9)
        1        1        1        1        0        0        0        0       20        0       43      400      511      488      485      401      476      481      482
      665      859      856      664      668      839      848      669      663      840      849      851
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-1
/com,*********** Elements for Body 2 "SYS\piezo" ***********
et,2,186
keyo,2,2,1          ! set full integration on SOLID186
eblock,19,solid,,42
(19i9)
        2        2        2        2        0        0        0        0       20        0        1       30       99      100      101       31       74       73       72
      212      350      351      213      217      310      308      216      211      313      311      309
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-1
/com,*********** Send User Defined Coordinate System(s) ***********
csys,0
toffst,273.15,  ! Temperature offset from absolute zero
/com,*********** Set Reference Temperature ***********
tref,22.
/com,*********** Send Materials ***********
Temperature = 'TEMP' ! Temperature
MP,DENS,1,7850,	! kg m^-3
MP,ALPX,1,1.2e-05,	! C^-1
MP,C,1,434,	! J kg^-1 C^-1
MP,KXX,1,60.5,	! W m^-1 C^-1
MP,RSVX,1,1.7e-07,	! kg m^3 A^-2 s^-3
MP,EX,1,200000000000,	! Pa
MP,NUXY,1,0.3,
MP,MURX,1,10000,

Temperature = 'TEMP' ! Temperature
MP,DENS,2,7850,	! kg m^-3
MP,ALPX,2,1.2e-05,	! C^-1
MP,C,2,434,	! J kg^-1 C^-1
MP,KXX,2,60.5,	! W m^-1 C^-1
MP,RSVX,2,1.7e-07,	! kg m^3 A^-2 s^-3
MP,EX,2,200000000000,	! Pa
MP,NUXY,2,0.3,
MP,MURX,2,10000,

! ****** Begin Command Snippet ******
*dim,matids,,1
*set,matids(1),2
*set,matid,2
*dim,typeids,,1
*set,typeids(1),2
ET,MATID,226,1001
MP,PERX,MATID,804.6 d
MP,PERY,MATID,804.6
MP,PERZ,MATID,659.7
TB,PIEZ,MATID
TBDATA,3,-4.1
TBDATA,6,-4.1
TBDATA,9,14.1
TBDATA,14,10.5
TBDATA,16,10.5


*set, matids, ,
*set, typeids, ,
! ****** End   Command Snippet ******
!************************* Model Summary ********************
!SYS\viga,	Structural Steel,	matid,	1
!SYS\piezo,	Structural Steel,	matid,	2
!************************* End Model Summary ********************
/com,*********** Create Contact "Contact Region" ***********
*set,tid,4
*set,cid,3
r,tid
r,cid
et,tid,170
et,cid,174
eblock,10,,,12
(15i9)
      103        4        4        4        0      503      392      393      504      641      639      644      875
      104        4        4        4        0      392      373      374      393      573      572      577      639
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-1
eblock,10,,,12
(15i9)
      115        3        3        3        0      503      392      393      504      641      639      644      875
      116        3        3        3        0      392      373      374      393      573      572      577      639
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-1
eblock,10,,,42
(15i9)
      127        3        4        3        0       72       31       74       73      216      217      310      308
      128        3        4        3        0       71       36       31       72      232      215      216      306
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-1
eblock,10,,,42
(15i9)
      169        4        3        4        0       72       31       74       73      216      217      310      308
      170        4        3        4        0       71       36       31       72      232      215      216      306
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-1
keyo,cid,8,2               ! auto create asymmetric contact (from Program Controlled setting)
keyo,cid,10,0              ! adjust contact stiffness each NR iteration (from Program Controlled setting)
keyo,cid,12,5              ! bonded always
keyo,cid,18,1              ! small sliding turned on by application
keyo,cid,2,0               ! augmented Lagrange (from Program Controlled setting)
keyo,cid,4,0               ! on Gauss point (from Program Controlled setting)
keyo,cid,9,1               ! ignore initial gaps/penetration
keyo,cid,7,0               ! No Prediction
rmod,tid,3,10.      ! FKN
rmod,tid,5,0.       ! ICONT
rmod,tid,6,0.       ! PINB
rmod,tid,10,0.      ! CNOF
rmod,tid,12,0.      ! FKT
rmod,tid,36,28      ! WB DSID
rmod,cid,3,10.      ! FKN
rmod,cid,5,0.       ! ICONT
rmod,cid,6,0.       ! PINB
rmod,cid,10,0.      ! CNOF
rmod,cid,12,0.      ! FKT
rmod,cid,36,28      ! WB DSID
nsel,all
esel,all
/com,*********** Send Named Selection as Node Component ***********
CMBLOCK,POS     ,NODE,      153
(8i10)
         1         2         3         4         5         6         7         8
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/com,*********** Send Named Selection as Node Component ***********
CMBLOCK,NEG     ,NODE,      153
(8i10)
        31        32        33        34        35        36        37        38
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/com,*********** Fixed Supports ***********
CMBLOCK,_FIXEDSU,NODE,      153
(8i10)
         1         2         3         4         5         6         7         8
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cmsel,s,_FIXEDSU
d,all,all
nsel,all
fini
/com,*********** Performing Modal Solve ***********
/solu
antype,2
modcontrol,on
thexpand,off     ! ignore thermal strains
mxpand,,,,yes,,no     ! expand element results for stress/strains, but not write them to file.mode
outres,erase
outres,all,none
outres,nsol,all
outres,strs,all
outres,epel,all
outres,rsol,all
modopt,lanb,200,0.,50000.
! ****** Begin Command Snippet ******
d, POS, VOLT, 7000000000
d, NEG, VOLT, 0
! ****** End   Command Snippet ******
! *********** WB SOLVE COMMAND ***********
! check interactive state
*get,ANSINTER_,active,,int
*if,ANSINTER_,ne,0,then
/eof
*endif
solve
/com *************** Write FE CONNECTORS *********
CEWRITE,file,ce,,INTE
/com *************** Write FE CONNECTORS *********
CEWRITE,file,ce,,INTE
fini
/com,*********** Performing MSUP Harmonic Solve ***********
/solu
antype,harm
harfrq,18000.000000,25000.000000
hropt,msup
thexpand,off     ! ignore thermal strains
hrout,off
kbc,1
nsub,10
! ****** Begin Command Snippet ******
d, POS, VOLT, 7000000000
d, NEG, VOLT, 0
! ****** End   Command Snippet ******
! *********** WB SOLVE COMMAND ***********
! check interactive state
*get,ANSINTER_,active,,int
*if,ANSINTER_,ne,0,then
/eof
*endif
solve
fini
! ------- MSUP EXPANSION PASS -------
/solu
expass,on
hrexp,all
outres,erase
outres,all,none
outres,nsol,all
outres,strs,all
outres,epel,all
outres,rsol,all
numexp,all,,,yes        ! expand results at all freq. stress calcs on
! ****** Begin Command Snippet ******
d, POS, VOLT, 7000000000
d, NEG, VOLT, 0
! ****** End   Command Snippet ******
! *********** WB SOLVE COMMAND ***********
! check interactive state
*get,ANSINTER_,active,,int
*if,ANSINTER_,ne,0,then
/eof
*endif
solve
/com *************** Write FE CONNECTORS *********
CEWRITE,file,ce,,INTE
fini
/post1
fini
